e := e
g := g
m1 := m1
l := l
m2 := m2
b := b
k := k
B := B
fi := fi
wfi := wfi
y := e*cos(B - fi) substitute, fi == fi(t) → cos(B - fi(t))*e
vy := d/dt(y) → d/dt(fi(t))*sin(B - fi(t))*e
vy := vy substitute, fi(t) == fi, d/dt(fi(t)) == wfi → wfi*sin(B - fi)*e
L := (m2*e^2*1/6 + l^2*m1*16/6)*wfi^2 - m1*g*2*l*sin(fi) + m2*g*e/2*cos(B - fi) - 1*k*e^2*cos(B - fi)^2/2 → (8*m1*l^2/3 + m2*e^2/6)*wfi^2 - k*e^2*cos(B - fi)^2/2 + g*m2*e*cos(B - fi)/2 - 2*g*l*m1*sin(fi)
N := b*vy^2 → b*wfi^2*sin(B - fi)^2*e^2
dLdwfi := d/dwfi(L) → 2*wfi*(8*m1*l^2/3 + m2*e^2/6) substitute, wfi == wfi(t) → 16*m1*wfi(t)*l^2/3 + m2*wfi(t)*e^2/3
dLdwfidt := d/dt(dLdwfi) → 16*m1*d/dt(wfi(t))*l^2/3 + m2*d/dt(wfi(t))*e^2/3
dLdfi := d/dfi(L) → g*m2*sin(B - fi)*e/2 - k*cos(B - fi)*sin(B - fi)*e^2 - 2*g*l*m1*cos(fi)
dNdwfi := d/dwfi(N) → 2*b*wfi*sin(B - fi)^2*e^2
rwn := dLdwfidt - dLdfi + dNdwfi/2 → 16*l^2*m1*d/dt(wfi(t))/3 + m2*d/dt(wfi(t))*e^2/3 - g*m2*sin(B - fi)*e/2 + k*cos(B - fi)*sin(B - fi)*e^2 + 2*g*l*m1*cos(fi) + b*wfi*sin(B - fi)^2*e^2
e := e
g := g
m1 := m1
l := l
m2 := m2
b := b
k := k
B := B
fi := fi
wfi := wfi
y := e*sin(fi) substitute, fi == fi(t) → sin(fi(t))*e
vy := d/dt(y) → d/dt(fi(t))*cos(fi(t))*e
vy := vy substitute, fi(t) == fi, d/dt(fi(t)) == wfi → wfi*e*cos(fi)
L := (m2*e^2*1/6 + l^2*m1*16/6)*wfi^2 - m1*g*2*l*sin(fi) + m2*g*e/2*sin(fi) - 1*k*e^2*sin(fi)^2/2 → wfi^2*(8*m1*l^2/3 + m2*e^2/6) - k*e^2*sin(fi)^2/2 + g*m2*e*sin(fi)/2 - 2*g*l*m1*sin(fi)
N := b*vy^2 → b*wfi^2*e^2*cos(fi)^2
dLdwfi := d/dwfi(L) → 2*wfi*(8*m1*l^2/3 + m2*e^2/6) substitute, wfi == wfi(t) → 16*m1*wfi(t)*l^2/3 + m2*wfi(t)*e^2/3
dLdwfidt := d/dt(dLdwfi) → 16*m1*d/dt(wfi(t))*l^2/3 + m2*d/dt(wfi(t))*e^2/3
dLdfi := d/dfi(L) → g*m2*e*cos(fi)/2 - k*e^2*cos(fi)*sin(fi) - 2*g*l*m1*cos(fi)
dNdwfi := d/dwfi(N) → 2*b*wfi*e^2*cos(fi)^2
rwn := dLdwfidt - dLdfi + dNdwfi/2 → 16*l^2*m1*d/dt(wfi(t))/3 + m2*d/dt(wfi(t))*e^2/3 + k*e^2*cos(fi)*sin(fi) - g*m2*e*cos(fi)/2 + 2*g*l*m1*cos(fi) + b*wfi*e^2*cos(fi)^2
