zs := zs
zu := zu
H := H
h := h
Lg := Lg
Lg_ := Lg_
Lp := Lp
Ld := Ld
Ld_ := Ld_
θ0 := θ0
L := L
Lw := Lw
φ := (-(zu - zs - H + h + Lg + Lg_ + Ld_) - sqrt((zu - zs - K + h + Lg + Lg_ + Ld_)^2 - 4*(Lp*(L - Lw*cos(θ0)))))/(2*Lp) substitute, zu == zu(t), zs == zs(t) → -(Lg - H + Ld_ + Lg_ + h - zs(t) + zu(t) + sqrt((Lg - K + Ld_ + Lg_ + h - zs(t) + zu(t))^2 - 4*Lp*(L - Lw*cos(θ0))))/(2*Lp)  # error: This variable is undefined.
ωφ := d/dt(φ) → (d/dt(zs(t)) - d/dt(zu(t)) + (d/dt(zs(t)) - d/dt(zu(t)))*(Lg - K + Ld_ + Lg_ + h - zs(t) + zu(t))/sqrt((Lg - K + Ld_ + Lg_ + h - zs(t) + zu(t))^2 - 4*Lp*(L - Lw*cos(θ0))))/(2*Lp)  # error: This variable is undefined.
ωφ1 := ωφ substitute, zu(t) == zu, zs(t) == zs, d/dt(zs(t)) == vs, d/dt(zu(t)) == vu → (vs - vu)*(Lg - K + Ld_ + Lg_ + h - zs + zu + sqrt((Lg - K + Ld_ + Lg_ + h - zs + zu)^2 - 4*Lp*(L - Lw*cos(θ0))))/(2*Lp*sqrt((Lg - K + Ld_ + Lg_ + h - zs + zu)^2 - 4*Lp*(L - Lw*cos(θ0))))  # error: This variable is undefined.
ωφvu := d/dvu(ωφ1) → -(Lg - K + Ld_ + Lg_ + h - zs + zu + sqrt((Lg - K + Ld_ + Lg_ + h - zs + zu)^2 - 4*Lp*(L - Lw*cos(θ0))))/(2*Lp*sqrt((Lg - K + Ld_ + Lg_ + h - zs + zu)^2 - 4*Lp*(L - Lw*cos(θ0))))  # error: This variable is undefined.
ωϕvs := d/dvs(ωφ1) → (Lg - K + Ld_ + Lg_ + h - zs + zu + sqrt((Lg - K + Ld_ + Lg_ + h - zs + zu)^2 - 4*Lp*(L - Lw*cos(θ0))))/(2*Lp*sqrt((Lg - K + Ld_ + Lg_ + h - zs + zu)^2 - 4*Lp*(L - Lw*cos(θ0))))  # error: This variable is undefined.
